# OpenSim document version 20302
ForwardTool eye_model:
  model_file: eye_model.osim
  replace_force_set: false
  results_directory: ForwardDynamics
  output_precision: 8
  initial_time: 0
  final_time: 0.2
  solve_for_equilibrium_for_auxiliary_states: true
  maximum_number_of_integrator_steps: 30000
  maximum_integrator_step_size: 1
  minimum_integrator_step_size: 0.00000001
  integrator_error_tolerance: 0.00001
  ControllerSet Controllers:
    ControlSetController: controls_file=controls.sto
