# OpenSim document version 30000
Model eye_model:
  publications: OpenEyeSim Alex Priamikov, Jochen Triesch
  length_units: meters
  force_units: N
  gravity: 0 -9.8066 0
  BodySet:
    Body ground: mass=0 mass_center=(0 0 0) inertia_xx=0 inertia_yy=0 inertia_zz=0
        meshes=(plane.vtp sacrum.vtp pelvis_r.vtp pelvis_l.vtp thorax.vtp hat_skull.vtp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)
      WrapSphere Sphere_left: translation=(-0.0317 1.578 -0.028) quadrant=all radius=0.0119
      WrapSphere Sphere_right: translation=(-0.0317 1.578 0.028) quadrant=all radius=0.0119
    Body left_eye: mass=0.0075 mass_center=(0 0 0) inertia_xx=4.32e-7 inertia_yy=4.32e-7 inertia_zz=4.32e-7
        meshes=eye_proper.obj
      BallJoint left_eye: parent_body=ground location_in_parent=(-0.0317 1.578 -0.028) location=(0 0 0)
        Coordinate left_xRotation: motion_type=rotational default_value=-5.086249e-12 range=(-1.65806 1.65806)
            clamped=true locked=true
        Coordinate left_yRotation: motion_type=rotational default_value=0 range=(-1.0472 1.65806) clamped=true
        Coordinate left_zRotation: motion_type=rotational default_value=-2.142857e-12 range=(-1.309 1.0472)
            clamped=true locked=true
  ForceSet:
    Millard2012EquilibriumMuscle [values shared by the 6 below unless stated]: min_control=0.1
        max_contraction_velocity=10 minimum_activation=0.01
      ActiveForceLengthCurve: min_norm_active_fiber_length=0.2441 transition_norm_fiber_length=0.93
          max_norm_active_fiber_length=15.8123 shallow_ascending_slope=0.9616 minimum_value=0
      ForceVelocityCurve: concentric_slope_at_vmax=0 concentric_slope_near_vmax=0.55 isometric_slope=5
          eccentric_slope_at_vmax=0 eccentric_slope_near_vmax=0.25 max_eccentric_velocity_force_multiplier=1.4
          concentric_curviness=0.9 eccentric_curviness=0.9
      FiberForceLengthCurve: strain_at_zero_force=0 strain_at_one_norm_force=0.4 stiffness_at_low_force=0.125
          stiffness_at_one_norm_force=20 curviness=0.8
      TendonForceLengthCurve
    Millard2012EquilibriumMuscle lateral_rect_left: max_isometric_force=69.93 optimal_fiber_length=0.0375
        tendon_slack_length=0.00771
      PathPoint lrl_eye: left_eye (0.0065 0 -0.01008)
      PathPoint P2: ground (-0.0397 1.57833 -0.04)
      PathPoint lrl_ground: ground (-0.0657 1.577 -0.015)
      PathWrap: wrap_object=Sphere_left method=hybrid
    Millard2012EquilibriumMuscle medial_rect_left: max_isometric_force=74.83 optimal_fiber_length=0.03192
        tendon_slack_length=0.00491
      PathPoint mrl_eye: left_eye (0.00885 0 0.00965)
      PathPoint P2: ground (-0.0367 1.57786 -0.014)
      PathPoint mrl_ground: ground (-0.0617 1.579 -0.011)
      PathWrap: wrap_object=Sphere_left method=hybrid
    Millard2012EquilibriumMuscle superior_rect_left: max_isometric_force=55.94 optimal_fiber_length=0.03382
        tendon_slack_length=0.0054
      PathPoint srl_eye: left_eye (0.00646 0.01025 -0.00276)
      ConditionalPathPoint default: ground (-0.0283508 1.59012 -0.0248078) range=(-1.65806 -0.698132)
          coordinate=left_yRotation
      PathPoint P2: ground (-0.04248 1.588 -0.02284)
      PathPoint srl_ground: ground (-0.06346 1.5816 -0.013)
      PathWrap: wrap_object=Sphere_left method=hybrid
    Millard2012EquilibriumMuscle inferior_rect_left: max_isometric_force=67.83 optimal_fiber_length=0.0356
        tendon_slack_length=0.0048
      PathPoint irl_eye: left_eye (0.00685 -0.01022 0.00176)
      PathPoint P2: ground (-0.04048 1.566 -0.02284)
      PathPoint irl_ground: ground (-0.06346 1.5756 -0.011)
      PathWrap: wrap_object=Sphere_left method=hybrid
    Millard2012EquilibriumMuscle superior_oblique_left: max_isometric_force=28.67 optimal_fiber_length=0.03415
        tendon_slack_length=0.0319
      PathPoint srl_eye: left_eye (-0.008 0.00882 -0.0029)
      ConditionalPathPoint default: ground (-0.0285236 1.59021 -0.024934) range=(-1.65806 -0.698132)
          coordinate=left_yRotation
      PathPoint P2: ground (-0.0207 1.58975 -0.01273)
      PathPoint srl_ground: ground (-0.0632 1.583 -0.01)
      PathWrap: wrap_object=Sphere_left method=hybrid
    Millard2012EquilibriumMuscle inferior_oblique_left: max_isometric_force=26.57 optimal_fiber_length=0.03055
        tendon_slack_length=0.00133
      PathPoint irl_eye: left_eye (-0.00918 0 -0.008)
      PathPoint P2: ground (-0.0217 1.56254 -0.015)
      PathPoint default: ground (-0.0217 1.56254 -0.015)
      PathWrap: wrap_object=Sphere_left method=hybrid
    CoordinateActuator left_xRotation: coordinate=left_xRotation optimal_force=1000
    CoordinateActuator left_yRotation: coordinate=left_yRotation optimal_force=1000
    CoordinateActuator left_zRotation: coordinate=left_zRotation optimal_force=1000
    SpringGeneralizedForce: coordinate=left_yRotation stiffness=1 rest_length=0 viscosity=0.01
    SpringGeneralizedForce: coordinate=left_xRotation stiffness=1 rest_length=0 viscosity=0.01
    SpringGeneralizedForce: coordinate=left_zRotation stiffness=1 rest_length=0 viscosity=0.01
